*Heading
** AR5 ABDG8 equivalent plate of preovios_try.out -- 5 x 5 S8R (cell-matched: one element per 3-D SG cell), clamped all round, LINEAR
** reference surface = the SG mid-plane, z = 0
** results -> abaqus/AR5_S8R/ (NOT AR5/: build_ff's ABDG* glob would pick these up)
*Preprint, echo=NO, model=NO, history=NO, contact=NO
*Node
1, 0.000000, 0.000000, 0.
2, 0.500000, 0.000000, 0.
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*Element, type=S8R
1, 1, 3, 20, 18, 2, 13, 19, 12
2, 3, 5, 22, 20, 4, 14, 21, 13
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*Elset, elset=ALL, generate
1, 25, 1
*Nset, nset=EDGE
1, 2, 3, 4, 5, 6
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*Shell General Section, elset=ALL
8.7488930e+03, 4.3705748e+03, 8.1810088e+03, 1.0568602e+01, 2.2914875e+01, 4.6176685e+03, 1.3277745e+01, 1.3518982e+01
-5.0553081e+00, 1.8790973e+03, 1.3520265e+01, 1.4996463e+01, -6.2767395e+00, 1.2137987e+03, 1.8157129e+03, -4.9804167e+00
-6.8882218e+00, 1.3050513e+01, 3.6437498e+00, 6.0781774e+00, 1.3046312e+03
*Transverse Shear Stiffness
1.3855794e+02, 1.1467662e+03, 1.3147104e+00
*Boundary
EDGE, ENCASTRE
*Step, name=STATIC, nlgeom=NO
*Static
*Dload
ALL, P, -1.0000
*Output, field
*Node Output
U, UR, RF, RM
*Element Output, directions=YES
SF, SM, SE
*End Step
