*HEADING
3-D FEA benchmark from layup_db.yaml -- ply-by-ply C3D20
*NODE
1, 0.00000000, 0.00000000, -0.07620000
2, 0.03810000, 0.00000000, -0.07620000
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*ELEMENT, TYPE=C3D20, ELSET=EALL
1, 1, 3, 65, 63, 1723, 1725, 1787, 1785, 2, 43, 64, 42, 1724, 1765, 1786,
1764, 1282, 1283, 1304, 1303
2, 3, 5, 67, 65, 1725, 1727, 1789, 1787, 4, 44, 66, 43, 1726, 1766, 1788,
1765, 1283, 1284, 1305, 1304
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*ELSET, ELSET=LAY1, GENERATE
1, 400, 1
*ELSET, ELSET=LAY2, GENERATE
401, 800, 1
*ELSET, ELSET=LAY3, GENERATE
801, 1200, 1
*ELSET, ELSET=LAY4, GENERATE
1201, 1600, 1
*ELSET, ELSET=LAY5, GENERATE
1601, 2000, 1
*ELSET, ELSET=LAY6, GENERATE
2001, 2400, 1
*ELSET, ELSET=LAY7, GENERATE
2401, 2800, 1
*ELSET, ELSET=LAY8, GENERATE
2801, 3200, 1
*ELSET, ELSET=LAY9, GENERATE
3201, 3600, 1
*ELSET, ELSET=LAY10, GENERATE
3601, 4000, 1
*ELSET, ELSET=LAY11, GENERATE
4001, 4400, 1
*ELSET, ELSET=LAY12, GENERATE
4401, 4800, 1
*ELSET, ELSET=LAY13, GENERATE
4801, 5200, 1
*ELSET, ELSET=LAY14, GENERATE
5201, 5600, 1
*ELSET, ELSET=LAY15, GENERATE
5601, 6000, 1
*ELSET, ELSET=LAY16, GENERATE
6001, 6400, 1
*NSET, NSET=FX0
1, 42, 63, 104, 125, 166
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*NSET, NSET=FXA
41, 62, 103, 124, 165, 186
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*NSET, NSET=FY0
1, 2, 3, 4, 5, 6
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*NSET, NSET=FYB
1241, 1242, 1243, 1244, 1245, 1246
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** NTOP3D -- the ONE deflection probe of this deck:
**   centre of the TOP surface, x = 0.762000  y = 0.762000  z = +0.076200 m
**   (Nayak's station: the loaded face.  z is measured from the
**    plate mid-plane, so the top face is at +h/2 = +0.076200 m.)
**   The shell's counterpart is NOT its node -- it must be
**   dehomogenized to this same z from its PATCHC resultants.
*NSET, NSET=NTOP3D
28193
** ETOPC -- the 4 top-layer elements meeting at NTOP3D; stresses are
**   extrapolated to nodes so the centre node is read at z = +h/2.
**   At that point sigma33 must equal MINUS the applied pressure
**   (-6.894760e+07 Pa): a traction boundary condition, hence an exact check.
*ELSET, ELSET=ETOPC
6190, 6191, 6210, 6211
*MATERIAL, NAME=GE
*ELASTIC, TYPE=ENGINEERING CONSTANTS
1.280000e+11, 1.100000e+10, 1.100000e+10, 0.25, 0.25, 0.25, 4.480000e+09, 4.480000e+09,
1.530000e+09
*DENSITY
1500,
*MATERIAL, NAME=HEREX
*ELASTIC, TYPE=ENGINEERING CONSTANTS
1.036300e+08, 1.036300e+08, 1.036300e+08, 0.32, 0.32, 0.32, 5.000000e+07, 5.000000e+07,
5.000000e+07
*DENSITY
130,
*ORIENTATION, NAME=OR1, SYSTEM=RECTANGULAR
1.0, 0.0, 0.0, 0.0, 1.0, 0.0
3, 0
*SOLID SECTION, ELSET=LAY1, MATERIAL=GE, ORIENTATION=OR1
,
*ORIENTATION, NAME=OR2, SYSTEM=RECTANGULAR
1.0, 0.0, 0.0, 0.0, 1.0, 0.0
3, 90
*SOLID SECTION, ELSET=LAY2, MATERIAL=GE, ORIENTATION=OR2
,
*ORIENTATION, NAME=OR3, SYSTEM=RECTANGULAR
1.0, 0.0, 0.0, 0.0, 1.0, 0.0
3, 0
*SOLID SECTION, ELSET=LAY3, MATERIAL=GE, ORIENTATION=OR3
,
*ORIENTATION, NAME=OR4, SYSTEM=RECTANGULAR
1.0, 0.0, 0.0, 0.0, 1.0, 0.0
3, 90
*SOLID SECTION, ELSET=LAY4, MATERIAL=GE, ORIENTATION=OR4
,
*ORIENTATION, NAME=OR5, SYSTEM=RECTANGULAR
1.0, 0.0, 0.0, 0.0, 1.0, 0.0
3, 0
*SOLID SECTION, ELSET=LAY5, MATERIAL=HEREX, ORIENTATION=OR5
,
*ORIENTATION, NAME=OR6, SYSTEM=RECTANGULAR
1.0, 0.0, 0.0, 0.0, 1.0, 0.0
3, 0
*SOLID SECTION, ELSET=LAY6, MATERIAL=HEREX, ORIENTATION=OR6
,
*ORIENTATION, NAME=OR7, SYSTEM=RECTANGULAR
1.0, 0.0, 0.0, 0.0, 1.0, 0.0
3, 0
*SOLID SECTION, ELSET=LAY7, MATERIAL=HEREX, ORIENTATION=OR7
,
*ORIENTATION, NAME=OR8, SYSTEM=RECTANGULAR
1.0, 0.0, 0.0, 0.0, 1.0, 0.0
3, 0
*SOLID SECTION, ELSET=LAY8, MATERIAL=HEREX, ORIENTATION=OR8
,
*ORIENTATION, NAME=OR9, SYSTEM=RECTANGULAR
1.0, 0.0, 0.0, 0.0, 1.0, 0.0
3, 0
*SOLID SECTION, ELSET=LAY9, MATERIAL=HEREX, ORIENTATION=OR9
,
*ORIENTATION, NAME=OR10, SYSTEM=RECTANGULAR
1.0, 0.0, 0.0, 0.0, 1.0, 0.0
3, 0
*SOLID SECTION, ELSET=LAY10, MATERIAL=HEREX, ORIENTATION=OR10
,
*ORIENTATION, NAME=OR11, SYSTEM=RECTANGULAR
1.0, 0.0, 0.0, 0.0, 1.0, 0.0
3, 0
*SOLID SECTION, ELSET=LAY11, MATERIAL=HEREX, ORIENTATION=OR11
,
*ORIENTATION, NAME=OR12, SYSTEM=RECTANGULAR
1.0, 0.0, 0.0, 0.0, 1.0, 0.0
3, 0
*SOLID SECTION, ELSET=LAY12, MATERIAL=HEREX, ORIENTATION=OR12
,
*ORIENTATION, NAME=OR13, SYSTEM=RECTANGULAR
1.0, 0.0, 0.0, 0.0, 1.0, 0.0
3, 90
*SOLID SECTION, ELSET=LAY13, MATERIAL=GE, ORIENTATION=OR13
,
*ORIENTATION, NAME=OR14, SYSTEM=RECTANGULAR
1.0, 0.0, 0.0, 0.0, 1.0, 0.0
3, 0
*SOLID SECTION, ELSET=LAY14, MATERIAL=GE, ORIENTATION=OR14
,
*ORIENTATION, NAME=OR15, SYSTEM=RECTANGULAR
1.0, 0.0, 0.0, 0.0, 1.0, 0.0
3, 90
*SOLID SECTION, ELSET=LAY15, MATERIAL=GE, ORIENTATION=OR15
,
*ORIENTATION, NAME=OR16, SYSTEM=RECTANGULAR
1.0, 0.0, 0.0, 0.0, 1.0, 0.0
3, 0
*SOLID SECTION, ELSET=LAY16, MATERIAL=GE, ORIENTATION=OR16
,
** SS-1 on the side FACES; solids have no rotational dof, so there
** is no drilling constraint and no edge-rotation choice to make
*BOUNDARY
FX0, 2, 3
FXA, 2, 3
FY0, 1, 1
FYB, 1, 1
FY0, 3, 3
FYB, 3, 3
*STEP, NAME=PULSE, INC=800
*DYNAMIC, DIRECT
5e-05, 0.02
*DLOAD
6001, P2, 4.244297e+05
6002, P2, 1.262838e+06
6003, P2, 2.070151e+06
6004, P2, 2.826491e+06
6005, P2, 3.513232e+06
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6400, P2, 4.244297e+05
*NODE PRINT, NSET=NTOP3D, FREQUENCY=1
U
*EL PRINT, ELSET=ETOPC, POSITION=NODES, FREQUENCY=1
S,
*END STEP
