*HEADING
Nayak-Shenoi-Moy Ex.5 sandwich, CONVENTIONAL Abaqus composite S8R (FSDT), step pulse
*NODE
1, 0.00000000, 0.00000000, 0.0
2, 0.03810000, 0.00000000, 0.0
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*ELEMENT, TYPE=S8R, ELSET=EALL
1, 1, 3, 65, 63, 2, 43, 64, 42
2, 3, 5, 67, 65, 4, 44, 66, 43
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*NSET, NSET=NCEN
641
*NSET, NSET=NX0
1, 42, 63, 104, 125, 166
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*NSET, NSET=NXA
41, 62, 103, 124, 165, 186
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*NSET, NSET=NY0
1, 2, 3, 4, 5, 6
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*NSET, NSET=NYB
1241, 1242, 1243, 1244, 1245, 1246
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*NSET, NSET=NALL, GENERATE
1, 1281, 1
*MATERIAL, NAME=GE
*ELASTIC, TYPE=LAMINA
1.280000e+11, 1.100000e+10, 0.25, 4.480000e+09, 4.480000e+09, 1.530000e+09
*DENSITY
1500,
*MATERIAL, NAME=HEREX
*ELASTIC, TYPE=LAMINA
1.036300e+08, 1.036300e+08, 0.32, 5.000000e+07, 5.000000e+07, 5.000000e+07
*DENSITY
130,
*SHELL SECTION, ELSET=EALL, COMPOSITE
0.0009525, 3, GE, 0
0.0009525, 3, GE, 90
0.0009525, 3, GE, 0
0.0009525, 3, GE, 90
0.14478, 3, HEREX, 0
0.0009525, 3, GE, 90
0.0009525, 3, GE, 0
0.0009525, 3, GE, 90
0.0009525, 3, GE, 0
** SS-1 + drilling (same rule as the RM deck)
*BOUNDARY
NX0, 2, 3
NXA, 2, 3
NY0, 1, 1
NYB, 1, 1
NY0, 3, 3
NYB, 3, 3
NALL, 6, 6
*AMPLITUDE, NAME=FT
0., 1., 0.02, 1.
*STEP, NAME=PULSE, INC=800
*DYNAMIC
5e-05, 0.02, 5e-09, 5e-05
*DLOAD, AMPLITUDE=FT
1, P, 4.244297e+05
2, P, 1.262838e+06
3, P, 2.070151e+06
4, P, 2.826491e+06
5, P, 3.513232e+06
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400, P, 4.244297e+05
*NODE PRINT, NSET=NCEN, FREQUENCY=1
U
*END STEP
