*HEADING
Nayak-Shenoi-Moy Ex.5 sandwich, OpenSG-RM 8x8 shell (S8R), blast pulse
** (0/90/0/90/core)s, a = b = 1.524 m, h = 0.1524 m, q0 = 6.89476e+07 Pa
** load q0 F(t) sin(pi x/a) sin(pi y/b); dt = 5e-05 s, T = 0.02 s
*NODE
1, 0.00000000, 0.00000000, 0.0
2, 0.03810000, 0.00000000, 0.0
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*ELEMENT, TYPE=S8R, ELSET=EALL
1, 1, 3, 65, 63, 2, 43, 64, 42
2, 3, 5, 67, 65, 4, 44, 66, 43
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*NSET, NSET=NCEN
641
*ELSET, ELSET=PATCHC
190, 191, 210, 211
*ELSET, ELSET=PATCHX
181, 182, 201, 202
*ELSET, ELSET=PATCHY
10, 30, 11, 31
*NSET, NSET=NX0
1, 42, 63, 104, 125, 166
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*NSET, NSET=NXA
41, 62, 103, 124, 165, 186
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*NSET, NSET=NY0
1, 2, 3, 4, 5, 6
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*NSET, NSET=NYB
1241, 1242, 1243, 1244, 1245, 1246
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*NSET, NSET=NALL, GENERATE
1, 1281, 1
**
*SHELL GENERAL SECTION, ELSET=EALL, DENSITY=30.2514
5.491650e+08, 2.641702e+07, 5.491650e+08, 1.552461e-10, 2.728769e-08, 4.137660e+07, 1.615853e-06, 1.661373e-06
2.251617e-25, 3.000546e+06, 1.622257e-06, 1.670780e-06, 2.985626e-25, 1.256596e+05, 2.937114e+06, 9.208540e-25
1.262866e-24, 3.124459e-10, 8.461209e-13, 1.487231e-10, 2.011171e+05
*TRANSVERSE SHEAR STIFFNESS
7.700977e+06, 7.542371e+06, -5.382646e-08
**
** SS-1 simple supports + drilling (cross-ply layup)
*BOUNDARY
NX0, 2, 3
NXA, 2, 3
NY0, 1, 1
NYB, 1, 1
NY0, 3, 3
NYB, 3, 3
NALL, 6, 6
*AMPLITUDE, NAME=FT
0, 1, 0.00025, 0.920811, 0.0005, 0.847894, 0.00075, 0.78075
0.001, 0.718924, 0.00125, 0.661993, 0.0015, 0.609571, 0.00175, 0.5613
0.002, 0.516851, 0.00225, 0.475923, 0.0025, 0.438235, 0.00275, 0.403532
0.003, 0.371577, 0.00325, 0.342152, 0.0035, 0.315058, 0.00375, 0.290109
0.004, 0.267135, 0.00425, 0.245981, 0.0045, 0.226502, 0.00475, 0.208566
0.005, 0.19205, 0.00525, 0.176842, 0.0055, 0.162838, 0.00575, 0.149943
0.006, 0.138069, 0.00625, 0.127136, 0.0065, 0.117068, 0.00675, 0.107798
0.007, 0.0992613, 0.00725, 0.0914009, 0.0075, 0.084163, 0.00775, 0.0774982
0.008, 0.0713613, 0.00825, 0.0657103, 0.0085, 0.0605068, 0.00875, 0.0557153
0.009, 0.0513033, 0.00925, 0.0472407, 0.0095, 0.0434998, 0.00975, 0.0400551
0.01, 0.0368832, 0.01025, 0.0339624, 0.0105, 0.031273, 0.01075, 0.0287965
0.011, 0.0265162, 0.01125, 0.0244164, 0.0115, 0.0224829, 0.01175, 0.0207025
0.012, 0.0190631, 0.01225, 0.0175535, 0.0125, 0.0161635, 0.01275, 0.0148835
0.013, 0.0137049, 0.01325, 0.0126197, 0.0135, 0.0116203, 0.01375, 0.0107001
0.014, 0.0098528, 0.01425, 0.00907257, 0.0145, 0.00835412, 0.01475, 0.00769257
0.015, 0.00708341, 0.01525, 0.00652248, 0.0155, 0.00600598, 0.01575, 0.00553037
0.016, 0.00509243, 0.01625, 0.00468917, 0.0165, 0.00431784, 0.01675, 0.00397592
0.017, 0.00366107, 0.01725, 0.00337115, 0.0175, 0.0031042, 0.01775, 0.00285838
0.018, 0.00263203, 0.01825, 0.0024236, 0.0185, 0.00223168, 0.01875, 0.00205496
0.019, 0.00189223, 0.01925, 0.00174239, 0.0195, 0.00160441, 0.01975, 0.00147736
0.02, 0.00136037
*STEP, NAME=PULSE, INC=800
*DYNAMIC
5e-05, 0.02, 5e-09, 5e-05
*DLOAD, AMPLITUDE=FT
1, P, 4.244297e+05
2, P, 1.262838e+06
3, P, 2.070151e+06
4, P, 2.826491e+06
5, P, 3.513232e+06
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400, P, 4.244297e+05
*OUTPUT, FIELD, FREQUENCY=20
*ELEMENT OUTPUT
SF, SM
*NODE OUTPUT
U
*NODE PRINT, NSET=NCEN, FREQUENCY=1
U
*EL PRINT, ELSET=PATCHC, FREQUENCY=1
SF, SM
*EL PRINT, ELSET=PATCHC, FREQUENCY=1
COORD
*EL PRINT, ELSET=PATCHX, FREQUENCY=1
SF, SM
*EL PRINT, ELSET=PATCHX, FREQUENCY=1
COORD
*EL PRINT, ELSET=PATCHY, FREQUENCY=1
SF, SM
*EL PRINT, ELSET=PATCHY, FREQUENCY=1
COORD
*END STEP
