*HEADING
Nayak-Shenoi-Moy Ex.5 sandwich, 3-D SOLID benchmark (C3D20), blast pulse
** 20 x 20 x 16 C3D20; one element per face ply, 8 through core
*NODE
1, 0.00000000, 0.00000000, 0.00000000
2, 0.03810000, 0.00000000, 0.00000000
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*ELEMENT, TYPE=C3D20
1, 1, 3, 65, 63, 1723, 1725, 1787, 1785, 2, 43, 64, 42, 1724, 1765, 1786,
1764, 1282, 1283, 1304, 1303
2, 3, 5, 67, 65, 1725, 1727, 1789, 1787, 4, 44, 66, 43, 1726, 1766, 1788,
1765, 1283, 1284, 1305, 1304
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*ELSET, ELSET=PLY1
1, 2, 3, 4, 5, 6
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*ELSET, ELSET=PLY2
401, 402, 403, 404, 405, 406
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*ELSET, ELSET=PLY3
801, 802, 803, 804, 805, 806
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*ELSET, ELSET=PLY4
1201, 1202, 1203, 1204, 1205, 1206
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*ELSET, ELSET=PLY5
1601, 1602, 1603, 1604, 1605, 1606
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*ELSET, ELSET=PLY6
4801, 4802, 4803, 4804, 4805, 4806
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*ELSET, ELSET=PLY7
5201, 5202, 5203, 5204, 5205, 5206
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*ELSET, ELSET=PLY8
5601, 5602, 5603, 5604, 5605, 5606
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*ELSET, ELSET=PLY9
6001, 6002, 6003, 6004, 6005, 6006
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*NSET, NSET=NCEN3D
14417
*ELSET, ELSET=COLC
190, 191, 210, 211, 590, 591
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*ELSET, ELSET=COLX
181, 201, 581, 601, 981, 1001
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*ELSET, ELSET=COLY
10, 11, 410, 411, 810, 811
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*NSET, NSET=NX0F
1, 42, 63, 104, 125, 166
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*NSET, NSET=NXAF
41, 62, 103, 124, 165, 186
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*NSET, NSET=NY0F
1, 2, 3, 4, 5, 6
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*NSET, NSET=NYBF
1241, 1242, 1243, 1244, 1245, 1246
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**
*MATERIAL, NAME=GE
*ELASTIC, TYPE=ENGINEERING CONSTANTS
1.280000e+11, 1.100000e+10, 1.100000e+10, 0.25, 0.25, 0.25, 4.480000e+09, 4.480000e+09,
1.530000e+09
*DENSITY
1500,
*MATERIAL, NAME=HEREX
*ELASTIC, TYPE=ENGINEERING CONSTANTS
1.036300e+08, 1.036300e+08, 1.036300e+08, 0.32, 0.32, 0.32, 5.000000e+07, 5.000000e+07,
5.000000e+07
*DENSITY
130,
*ORIENTATION, NAME=OR1, SYSTEM=RECTANGULAR
1.0, 0.0, 0.0, 0.0, 1.0, 0.0
3, 0
*SOLID SECTION, ELSET=PLY1, MATERIAL=GE, ORIENTATION=OR1
*ORIENTATION, NAME=OR2, SYSTEM=RECTANGULAR
1.0, 0.0, 0.0, 0.0, 1.0, 0.0
3, 90
*SOLID SECTION, ELSET=PLY2, MATERIAL=GE, ORIENTATION=OR2
*ORIENTATION, NAME=OR3, SYSTEM=RECTANGULAR
1.0, 0.0, 0.0, 0.0, 1.0, 0.0
3, 0
*SOLID SECTION, ELSET=PLY3, MATERIAL=GE, ORIENTATION=OR3
*ORIENTATION, NAME=OR4, SYSTEM=RECTANGULAR
1.0, 0.0, 0.0, 0.0, 1.0, 0.0
3, 90
*SOLID SECTION, ELSET=PLY4, MATERIAL=GE, ORIENTATION=OR4
*ORIENTATION, NAME=OR5, SYSTEM=RECTANGULAR
1.0, 0.0, 0.0, 0.0, 1.0, 0.0
3, 0
*SOLID SECTION, ELSET=PLY5, MATERIAL=HEREX, ORIENTATION=OR5
*ORIENTATION, NAME=OR6, SYSTEM=RECTANGULAR
1.0, 0.0, 0.0, 0.0, 1.0, 0.0
3, 90
*SOLID SECTION, ELSET=PLY6, MATERIAL=GE, ORIENTATION=OR6
*ORIENTATION, NAME=OR7, SYSTEM=RECTANGULAR
1.0, 0.0, 0.0, 0.0, 1.0, 0.0
3, 0
*SOLID SECTION, ELSET=PLY7, MATERIAL=GE, ORIENTATION=OR7
*ORIENTATION, NAME=OR8, SYSTEM=RECTANGULAR
1.0, 0.0, 0.0, 0.0, 1.0, 0.0
3, 90
*SOLID SECTION, ELSET=PLY8, MATERIAL=GE, ORIENTATION=OR8
*ORIENTATION, NAME=OR9, SYSTEM=RECTANGULAR
1.0, 0.0, 0.0, 0.0, 1.0, 0.0
3, 0
*SOLID SECTION, ELSET=PLY9, MATERIAL=GE, ORIENTATION=OR9
**
** SS-1 simple supports (same rule as the shell)
*BOUNDARY
NX0F, 2, 3
NXAF, 2, 3
NY0F, 1, 1
NYBF, 1, 1
NY0F, 3, 3
NYBF, 3, 3
*AMPLITUDE, NAME=FT
0, 1, 0.00025, 0.920811, 0.0005, 0.847894, 0.00075, 0.78075
0.001, 0.718924, 0.00125, 0.661993, 0.0015, 0.609571, 0.00175, 0.5613
0.002, 0.516851, 0.00225, 0.475923, 0.0025, 0.438235, 0.00275, 0.403532
0.003, 0.371577, 0.00325, 0.342152, 0.0035, 0.315058, 0.00375, 0.290109
0.004, 0.267135, 0.00425, 0.245981, 0.0045, 0.226502, 0.00475, 0.208566
0.005, 0.19205, 0.00525, 0.176842, 0.0055, 0.162838, 0.00575, 0.149943
0.006, 0.138069, 0.00625, 0.127136, 0.0065, 0.117068, 0.00675, 0.107798
0.007, 0.0992613, 0.00725, 0.0914009, 0.0075, 0.084163, 0.00775, 0.0774982
0.008, 0.0713613, 0.00825, 0.0657103, 0.0085, 0.0605068, 0.00875, 0.0557153
0.009, 0.0513033, 0.00925, 0.0472407, 0.0095, 0.0434998, 0.00975, 0.0400551
0.01, 0.0368832, 0.01025, 0.0339624, 0.0105, 0.031273, 0.01075, 0.0287965
0.011, 0.0265162, 0.01125, 0.0244164, 0.0115, 0.0224829, 0.01175, 0.0207025
0.012, 0.0190631, 0.01225, 0.0175535, 0.0125, 0.0161635, 0.01275, 0.0148835
0.013, 0.0137049, 0.01325, 0.0126197, 0.0135, 0.0116203, 0.01375, 0.0107001
0.014, 0.0098528, 0.01425, 0.00907257, 0.0145, 0.00835412, 0.01475, 0.00769257
0.015, 0.00708341, 0.01525, 0.00652248, 0.0155, 0.00600598, 0.01575, 0.00553037
0.016, 0.00509243, 0.01625, 0.00468917, 0.0165, 0.00431784, 0.01675, 0.00397592
0.017, 0.00366107, 0.01725, 0.00337115, 0.0175, 0.0031042, 0.01775, 0.00285838
0.018, 0.00263203, 0.01825, 0.0024236, 0.0185, 0.00223168, 0.01875, 0.00205496
0.019, 0.00189223, 0.01925, 0.00174239, 0.0195, 0.00160441, 0.01975, 0.00147736
0.02, 0.00136037
*STEP, NAME=PULSE, INC=800
*DYNAMIC
5e-05, 0.02, 5e-09, 5e-05
*DLOAD, AMPLITUDE=FT
6001, P2, 4.244297e+05
6002, P2, 1.262838e+06
6003, P2, 2.070151e+06
6004, P2, 2.826491e+06
6005, P2, 3.513232e+06
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6400, P2, 4.244297e+05
*OUTPUT, FIELD, FREQUENCY=50
*ELEMENT OUTPUT
S
*NODE OUTPUT
U
*NODE PRINT, NSET=NCEN3D, FREQUENCY=1
U
*EL PRINT, ELSET=COLC, POSITION=CENTROIDAL, FREQUENCY=10
S
*EL PRINT, ELSET=COLX, POSITION=CENTROIDAL, FREQUENCY=10
S
*EL PRINT, ELSET=COLY, POSITION=CENTROIDAL, FREQUENCY=10
S
*END STEP
