*HEADING
Garg cylindrical-bending strip, MSG-RM 8x8 general shell section
** case caseA: plies pagano(33.33mm/0), pagano(33.33mm/90), pagano(33.33mm/0)
** S = a/h = 10,  a = 1 m,  h = 0.1 m,  q0 = 10000 Pa
** load q(x) = q0*sin(pi*x/a), piecewise-constant per element column
** PREDICTED mid-span |w|: MSG closed form 9.438171e-05 m ; exact 3-D 9.316429e-05 m
**   (check the .dat U3 at node NMID against these after the job)
** D11 = 2.014295e+06 ; G11 = 2.333725e+07 ; G22 = 2.528884e+07
**
*NODE
1, 0.00000000, 0.00000000, 0.0
2, 0.00000000, 0.01000000, 0.0
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*ELEMENT, TYPE=S4, ELSET=EALL
1, 1, 3, 4, 2
2, 3, 5, 6, 4
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*ELSET, ELSET=EMID
50
*ELSET, ELSET=EEND
1
*NSET, NSET=NX0
1, 2
*NSET, NSET=NXA
201, 202
*NSET, NSET=NMID
101
*NSET, NSET=NALL, GENERATE
1, 202, 1
**
** ---- the MSG-RM section: [[A,B],[B,D]] 21 constants + the 2x2 shear G ----
*SHELL GENERAL SECTION, ELSET=EALL
1.704261e+09, 2.506266e+07, 9.022556e+08, 5.064329e-10, 4.860221e-08, 5.000000e+07, -2.829214e-09, 1.068141e-10
-1.048559e-27, 2.014295e+06, -9.601260e-12, -3.893267e-09, -2.018529e-25, 2.088555e+04, 1.578019e+05, -2.041282e-27
-2.024588e-25, -4.590144e-10, 4.689193e-14, 4.500205e-12, 4.166667e+04
*TRANSVERSE SHEAR STIFFNESS
2.333725e+07, 2.528884e+07, -1.060187e-06
**
** ---- cylindrical bending + simple supports ----
*BOUNDARY
NALL, 2, 2
NALL, 4, 4
NALL, 6, 6
NX0, 3, 3
NXA, 3, 3
NX0, 1, 1
**
*STEP, NAME=SINELOAD
*STATIC
** pressure on the shell face, element-centre value of q0*sin(pi*x/a)
*DLOAD
1, P, 1.570732e+02
2, P, 4.710645e+02
3, P, 7.845910e+02
4, P, 1.097343e+03
5, P, 1.409012e+03
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100, P, 1.570732e+02
*OUTPUT, FIELD
*ELEMENT OUTPUT
SF, SM
*NODE OUTPUT
U
*NODE PRINT, NSET=NMID
U
*EL PRINT, ELSET=EMID
SF, SM
*EL PRINT, ELSET=EEND
SF, SM
*END STEP
