*HEADING
Cylindrical-bending strip, community FSDT composite section
** case caseC: plies face(25mm/0), core(200mm/0), face(25mm/0)
** S = a/h = 4,  h = 0.25 m
** PREDICTED mid-span |w|: MSG closed form 3.811588e-05 m ; exact 3-D 3.394725e-05 m
**   (check the .dat U3 at node NMID against these after the job)
** COMMUNITY FSDT variant: composite section, Abaqus ABD + its own shear
** span a = 1 m, q0 = 10000 Pa, 100 S4 elements; load q0*sin(pi*x/a) per element
*NODE
1, 0.00000000, 0.00000000, 0.0
2, 0.00000000, 0.01000000, 0.0
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*ELEMENT, TYPE=S4, ELSET=EALL
1, 1, 3, 4, 2
2, 3, 5, 6, 4
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*ELSET, ELSET=EMID
50
*ELSET, ELSET=EEND
1
*NSET, NSET=NX0
1, 2
*NSET, NSET=NXA
201, 202
*NSET, NSET=NMID
101
*NSET, NSET=NALL, GENERATE
1, 202, 1
**
** ---- ply materials (lamina) ----
*MATERIAL, NAME=FACE
*ELASTIC, TYPE=LAMINA
1.310000e+11, 1.034000e+10, 0.22, 6.205000e+09, 6.205000e+09, 3.000000e+09
*MATERIAL, NAME=CORE
*ELASTIC, TYPE=LAMINA
5.776000e+08, 5.776000e+08, 0.0025, 1.079000e+08, 1.079000e+08, 1.079000e+08
** ---- community FSDT: the ply stack; Abaqus builds ABD + shear ----
*SHELL SECTION, ELSET=EALL, COMPOSITE
2.50000000e-02, 3, FACE, 0
2.00000000e-01, 3, CORE, 0
2.50000000e-02, 3, FACE, 0
**
** ---- cylindrical bending + simple supports ----
*BOUNDARY
NALL, 2, 2
NALL, 4, 4
NALL, 6, 6
NX0, 3, 3
NXA, 3, 3
NX0, 1, 1
**
*STEP, NAME=SINELOAD
*STATIC
*DLOAD
1, P, 1.570732e+02
2, P, 4.710645e+02
3, P, 7.845910e+02
4, P, 1.097343e+03
5, P, 1.409012e+03
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100, P, 1.570732e+02
*OUTPUT, FIELD
*ELEMENT OUTPUT
SF, SM
*NODE OUTPUT
U
*NODE PRINT, NSET=NMID
U
*EL PRINT, ELSET=EMID
SF, SM
*EL PRINT, ELSET=EEND
SF, SM
*END STEP
