*HEADING
OpenSG-RM static cylindrical bending, garg_caseA
*NODE
1, 0.00000000, 0.00000000, 0.0
2, 0.01250000, 0.00000000, 0.0
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*ELEMENT, TYPE=S8R, ELSET=EALL
1, 1, 3, 125, 123, 2, 83, 124, 82
2, 3, 5, 127, 125, 4, 84, 126, 83
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*NSET, NSET=X0
1, 82, 123, 204, 245, 326, 367, 448, 489
*NSET, NSET=XA
81, 122, 203, 244, 325, 366, 447, 488, 569
*NSET, NSET=NALL, GENERATE
1, 569, 1
*SHELL GENERAL SECTION, ELSET=EALL, DENSITY=0.1
1.704261e+09, 2.506266e+07, 9.022556e+08, 5.064329e-10, 4.860221e-08, 5.000000e+07, -1.220962e-08, -2.783167e-10
-2.163585e-27, 2.014295e+06, -3.074205e-10, -4.117661e-09, -1.861323e-25, 2.088555e+04, 1.578019e+05, -1.995104e-27
-1.858547e-25, -3.150614e-10, 4.689193e-14, 4.500205e-12, 4.166667e+04
*TRANSVERSE SHEAR STIFFNESS
2.333725e+07, 2.528884e+07, -2.090007e-07
** CYLINDRICAL BENDING: SS at x = 0 and x = a (w = 0), one axial
** anchor (u = 0 at x = 0), and PLANE STRAIN on every node:
** v = 0 (dof 2), UR1 = 0 (dof 4, twist about x), drilling fixed.
*BOUNDARY
X0, 3, 3
XA, 3, 3
X0, 1, 1
NALL, 2, 2
NALL, 4, 4
NALL, 6, 6
*STEP, NAME=STATIC
*STATIC
1.0, 1.0
*DLOAD
1, P, 3.925982e+02
2, P, 1.175374e+03
3, P, 1.950903e+03
4, P, 2.714404e+03
5, P, 3.461171e+03
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160, P, 3.925982e+02
*NODE PRINT, NSET=NALL, FREQUENCY=1
U
*EL PRINT, ELSET=EALL, FREQUENCY=1
SF, SM
*EL PRINT, ELSET=EALL, FREQUENCY=1
COORD
*END STEP
