*HEADING
Yu-2003 sec. 6.2 dynamics: clamped [90/0] plate, corner mass, impulse
** MSG-RM 8x8 general section; w = 0.04 m, h = 0.01 m, S4 24 x 24
** corner mass 50 kg at A, impulse to 10000 N over 0.002 s, dt = 0.0001 s
** recovery patches: M node (12,12), Q node (6,18)
*NODE
1, 0.00000000, 0.00000000, 0.0
2, 0.00166667, 0.00000000, 0.0
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*ELEMENT, TYPE=S4, ELSET=EALL
1, 1, 2, 27, 26
2, 2, 3, 28, 27
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*ELEMENT, TYPE=MASS, ELSET=CM
1576, 1
*MASS, ELSET=CM
50,
*NSET, NSET=NA
1
*NSET, NSET=NM
313
*NSET, NSET=NQ
457
*NSET, NSET=NBC
25, 50, 75, 100, 125, 150
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*NSET, NSET=NCD
601, 602, 603, 604, 605, 606
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*ELSET, ELSET=PATCHM
276, 277, 300, 301
*ELSET, ELSET=PATCHQ
414, 415, 438, 439
**
*SHELL GENERAL SECTION, ELSET=EALL, DENSITY=16
8.987482e+08, 1.729326e+07, 8.987482e+08, 5.241557e-10, 5.027267e-08, 3.450000e+07, 2.073938e+06, -5.358313e-12
-1.310389e-12, 7.489568e+03, 2.030132e-11, -2.073938e+06, -1.256817e-10, 1.441105e+02, 7.489568e+03, -1.310389e-12
-1.256817e-10, -9.583969e-12, 4.367964e-15, 4.189389e-13, 2.875000e+02
*TRANSVERSE SHEAR STIFFNESS
1.485769e+07, 1.485769e+07, -7.424535e-08
**
*BOUNDARY
NBC, 1, 6
NCD, 1, 6
**
*AMPLITUDE, NAME=TRI
0., 0., 0.001, 1., 0.002, 0., 1., 0.
**
*STEP, NAME=IMPULSE, INC=2000
*DYNAMIC
0.0001, 0.05, 1e-08, 0.0001
*CLOAD, AMPLITUDE=TRI
1, 3, -10000
*OUTPUT, FIELD, FREQUENCY=10
*ELEMENT OUTPUT
SF, SM
*NODE OUTPUT
U
*NODE PRINT, NSET=NM, FREQUENCY=1
U
*NODE PRINT, NSET=NA, FREQUENCY=1
U
*EL PRINT, ELSET=PATCHM, FREQUENCY=1
SF, SM
*EL PRINT, ELSET=PATCHM, FREQUENCY=1
COORD
*EL PRINT, ELSET=PATCHQ, FREQUENCY=1
SF, SM
*EL PRINT, ELSET=PATCHQ, FREQUENCY=1
COORD
*END STEP
