*HEADING
Yu-2003 sec. 6.2 dynamics SOLID benchmark: [90/0] plate, corner mass
** C3D8I 24 x 24 x 8, mass+load at the mid-thickness corner node
** EL PRINT S is in the PLY LOCAL frame (ORIENTATION) -- post rotates
*NODE
1, 0.00000000, 0.00000000, 0.00000000
2, 0.00166667, 0.00000000, 0.00000000
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*ELEMENT, TYPE=C3D8I
1, 1, 2, 27, 26, 626, 627, 652, 651
2, 2, 3, 28, 27, 627, 628, 653, 652
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*ELSET, ELSET=PLY1, GENERATE
1, 2304, 1
*ELSET, ELSET=PLY2, GENERATE
2305, 4608, 1
*ELEMENT, TYPE=MASS, ELSET=CM
5608, 2501
*MASS, ELSET=CM
50,
*NSET, NSET=NM3D
2813
*NSET, NSET=NA3D
2501
*NSET, NSET=NBC3D
25, 50, 75, 100, 125, 150
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*NSET, NSET=NCD3D
601, 602, 603, 604, 605, 606
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*ELSET, ELSET=COLM3D
276, 277, 300, 301, 852, 853
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*ELSET, ELSET=COLQ3D
414, 415, 438, 439, 990, 991
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**
*MATERIAL, NAME=YU62
*ELASTIC, TYPE=ENGINEERING CONSTANTS
1.724000e+11, 6.900000e+09, 6.900000e+09, 0.25, 0.25, 0.25, 3.450000e+09, 3.450000e+09,
1.380000e+09
*DENSITY
1600,
*ORIENTATION, NAME=OR1, SYSTEM=RECTANGULAR
1.0, 0.0, 0.0, 0.0, 1.0, 0.0
3, 90
*SOLID SECTION, ELSET=PLY1, MATERIAL=YU62, ORIENTATION=OR1
*ORIENTATION, NAME=OR2, SYSTEM=RECTANGULAR
1.0, 0.0, 0.0, 0.0, 1.0, 0.0
3, 0
*SOLID SECTION, ELSET=PLY2, MATERIAL=YU62, ORIENTATION=OR2
**
*BOUNDARY
NBC3D, 1, 3
NCD3D, 1, 3
**
*AMPLITUDE, NAME=TRI
0., 0., 0.001, 1., 0.002, 0., 1., 0.
**
*STEP, NAME=IMPULSE, INC=2000
*DYNAMIC
0.0001, 0.05, 1e-08, 0.0001
*CLOAD, AMPLITUDE=TRI
2501, 3, -10000
*OUTPUT, FIELD, FREQUENCY=50
*ELEMENT OUTPUT
S
*NODE OUTPUT
U
*NODE PRINT, NSET=NM3D, FREQUENCY=1
U
*NODE PRINT, NSET=NA3D, FREQUENCY=1
U
*EL PRINT, ELSET=COLM3D, POSITION=CENTROIDAL, FREQUENCY=96
S
*EL PRINT, ELSET=COLQ3D, POSITION=CENTROIDAL, FREQUENCY=96
S
*END STEP
